*Heading
** Job name: DummyStructureAbaqus Model name: Model-1
** Generated by: Abaqus/CAE 2026
*Preprint, echo=NO, model=NO, history=NO, contact=NO
**
** PARTS
**
*Part, name=Part-1
*Node
      1, -2.20000002e-05, -0.000275000057
      2, -2.49999994e-05, -0.000275000057
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*Element, type=CPS3
  1,   1,  15, 148
  2,  15, 446, 148
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*Nset, nset=TopFixed
 1930, 1932, 2192
*Nset, nset=ContactInterface
 751, 752, 753, 754, 755, 756
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*End Part
**
**
** ASSEMBLY
**
*Assembly, name=Assembly
**
*Instance, name=Part-1-1, part=Part-1
*End Instance
**
*Nset, nset=BottomFixed, instance=Part-1-1
  12,  14, 313
*Nset, nset=ContactInterface_B, instance=Part-1-1
 799, 855, 856, 857, 858, 859, 860, 861, 862, 863
*Nset, nset=ContactInterface_L, instance=Part-1-1, generate
 785,  787,    1
*Nset, nset=ContactInterface_R, instance=Part-1-1
 751, 752, 753, 754, 755, 756, 757, 758, 759, 800
*Nset, nset=ContactInterface_T, instance=Part-1-1, generate
 764,  766,    1
*Nset, nset=TopFixed, instance=Part-1-1
 1930, 1932, 2192
*End Assembly
** ----------------------------------------------------------------
**
** STEP: Step-1
**
*Step, name=Step-1, nlgeom=NO
*Static
1., 1., 1e-05, 1.
**
** OUTPUT REQUESTS
**
*Restart, write, frequency=0
**
** FIELD OUTPUT: F-Output-1
**
*Output, field, variable=PRESELECT
**
** HISTORY OUTPUT: H-Output-1
**
*Output, history, variable=PRESELECT
*End Step
